# Вариант 2
# Задача 1 "Проверка статистических гипотез"
# Дано: | Гипотезы
# H_0: a1 = a2. Термообработка не увеличила растяжимость пружины
n1 := 50  # Объём первой выборки
xsr1 := 3.8  # Выборочное стреднее первой выборки  # H_1: a1<a2. Термообработка увеличила растяжимость пружины
n2 := 40  # Объём второй выборки
xsr2 := 4.0  # Выборочное среднее второй выборки
σ := 0.5  # СКО
α := 0.05  # Уровень значимости
Knabl := (xsr1 - xsr2)/sqrt(σ^2/n1 + σ^2/n2) = -1.88562  # Наблюдаемое значение параметра
x := -4, -3.99 .. 4
# Плотность нормального распределения
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# Альтернативная гипотеза левосторонняя. Ищем Kkrit с помощью значений функции Лапласа.
Kkrit := qnorm(1/2 - α + 0.5, 0, 1) = 1.64485
# Так как критическая область левосторонная (-\infty; -1,645). Наблюдаемое значение попадает в критическую область, следовательно, основную гипотезу отклоняем в пользу альтернативной.
# Т. е. термообработка увеличила растяжимость пружины.
# Задача 2. "Критерий согласия Пирсона"
# Дано:
ORIGIN := 1
k := 6  # Число интервалов группировки
n := 33  # Объём выборки
α := 0.05  # Уровень значимости
r := 2  # Число зависимых степеней для нормального распределения
# Число попаданий СВ х в заданные интервалы(по условию задачи)
nj := [3; 6; 9; 8; 5; 2]
a := [2.3; 2.5; 2.7; 2.9; 3.1; 3.3; 3.5]
# Расчёт середин интервалов для вычисления среднего арифметического по сгруппированному статистическому ряду
zj := [
    (a[1] + a[2])/2;
    (a[2] + a[3])/2;
    (a[3] + a[4])/2;
    (a[4] + a[5])/2;
    (a[5] + a[6])/2;
    (a[6] + a[7])/2
] = [2.4; 2.6; 2.8; 3; 3.2; 3.4]
# Вычисляем среднее арифметическое по формуле по сгруппированному статистическому ряду
xsr := 1/n*sum(nj[j]*zj[j], j = 1 .. k) = 2.87273
# Вычисляем исправленную дисперсию по сгрупп. статичтисескому ряду. Получим оценку дисперсии.
s2 := 1/(n - 1)*sum(nj[i]*(zj[i] - xsr)^2, i = 1 .. k) = 0.0745455
# Вычислим выборочное СКО
sko := sqrt(s2) = 0.27303
# С помощью критерия Пирсона проверим основную гипотезу
# Н0: X~N(a, σ), то есть X~N(2.873, 0.273) с параметрами, рассчитанными по выборке
# Альтернативная гипотеза
# H1: X != N(a, σ), то есть X != N(2.873, 0.273)
# Вычислим вероятности pj попадания в интервалы. Так как мы предполагаем, что X~N(a, σ), то используем формулу "Вероятность попадания нормально распределённой СВ в заданный интервал"
i := 1 .. 6
p[i] := pnorm(a[i + 1], xsr, sko) - pnorm(a[i], xsr, sko)
sum(p) = 0.971236
p = [0.0681357; 0.177385; 0.276296; 0.257627; 0.143789; 0.0480032]
# Вычислим наблюдаемое значение K~χ^2(k-r-1)
Knabl := sum((nj[i] - n*p[i])^2/(n*p[i]), i = 1 .. k) = 0.408858
# Вычислим критическое значение статистики  K~χ^2(k-r-1)
Kkrit := qchisq(1 - α, k - r - 1) = 7.81473
# Критическая область критерия Пирсона правосторонняя, то есть (Kkrit; +\infty)
# Статистичкеское решение: Knabl < Kkrit => наблюдаемое значение не попадает в критическую область
# =>(следовательно) гипотеза Н0 принимается: СВ имеет нормальное распределение X~N(2.873, 0.273) с параметрами ,рассчитанными по выборке
# Задача 3. "Проверка однородности выборок с помощью критерия знаков"
# Дано:
α := 0.05  # Уровень значимости
# Гипотезы:
# Н0: F1(x)=F2(x)
# H1: F1(x)!=F2(x)
# Вычитаем соответствующие значения второй выборки из значений первой для поиска нетипичных сдвигов
Knabl := 7
x := [0.81; 3.3; 5.52; 1.64; 4.18; 2.81; 1.32; 4.09; 3.44; 1.68; 0.1; 1.56; 1.01; 2.41; 1.49; 2.11; 4.42; 4.21; 2.5; 0.3]
y := [4.17; 0.79; 3.26; 2.14; 2.7; 2.89; 3.26; 3.83; 4.63; 2.89; 2.89; 2.41; 2.97; 3.19; 3.35; 2.52; 3.22; 3.14; 2.36; 3.4]
Kkit := 5
# Так как притерий знаков левосторонний, критическая область имеет вид (-\infty; 5)
# Следовательно наблюдаемое значение не попадает в критическую область => мы отвергаем гипотезу Н1. То есть, выборки однородны.
z := x - y = [-3.36; 2.51; 2.26; -0.5; 1.48; -0.08; -1.94; 0.26; -1.19; -1.21; -2.79; -0.85; -1.96; -0.78; -1.86; -0.41; 1.2; 1.07; 0.14; -3.1]
# Задача 4. "Проверка однородности выборки с помощью критерия Вилкоксона"
# Дано:
α := 0.02  # Уровень значимости
# Гипотезы:
# Н0: F1(x)=F2(x)
# H1: F1(x)!=F2(x)
# Объединяем и сортируем выобрки
x := [0.81; 3.3; 5.52; 1.64; 4.18; 2.81; 1.32; 4.09; 3.44; 1.68; 0.1; 1.56; 1.01; 2.41; 1.49; 2.11; 4.42; 4.21; 2.5; 0.3]
y := [4.17; 0.79; 3.26; 2.14; 2.7; 2.89; 3.26; 3.83; 4.63; 2.89; 2.89; 2.41; 2.97; 3.19; 3.35; 2.52; 3.22; 3.14; 2.36; 3.4]
z := stack(x, y)
sort(z)
# Ранжируем объединённые выборки
z1 := Rank(z) = [
    4; 29; 40; 9; 36; 19; 6; 34; 32; 10
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]
# Находим наблюдаемое значение критерия Вилкоксона, суммируя ранги первой выборки
Knabl := sum(z1[i], i = 1 .. 20) = 358.5
WL := 324
WR := 496
# Так как критерий Вилкоксона имеет двустороннюю крит. область, в данной ситуации она имеет вид (-\infty; 324) (496; +\infty). Наблюдаемое значение не попадает в крит. область => мы отвергаем альтернативную гипотезу. То есть, выборки однородны.
