# Лабораторная работа №3 "Метод Монте-Карло"
# Вариант 2
# Часть 1
# Задаём начальные значения:
n := 100  # общее количество чисел, которые будут сгенерированны
K := 11^11  # - большое число
m[0] := 1  # - целое
i := 1, 2 .. n - 1
M := 3^33  # - целое, взаимно простое с K
gcd(K, M) = 1
# Вычисляем первое число
γ[0] := m[0]/M = 1.79887e-16
m[i] := mod(K*m[i - 1], M)
γ[i] := m[i]/M
γ = [
    0; 5.13237e-5; 0.430156; 0.32091; 0.880895; 0.965054; 0.0734285; 0.43885; 0.936399; 0.57116
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]
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# По визуальному отображению нельзя сказать однозначно о виде распределения
γsr := mean(γ) = 0.504046  # - среднее арифметическое
# - дисперсия
D := sum((γ[i] - γsr)^2, i)/n = 0.0833017
sko := sqrt(D) = 0.28862  # среднеквадратическое отклонение
# Параметры, полученные по сгенерированным числам близки к параметрам равномерного распределения.
# Построение гистограммы
k := 10  # - количество интервалов
i := 0 .. k
d := (1 - 0)/k = 0.1  # - шаг интервала
interval[i] := i*d  # - границы интервалов
ch := hist(interval, γ)
# частоты попадания в интервалы
interval = [0; 0.1; 0.2; 0.3; 0.4; 0.5; 0.6; 0.7; 0.8; 0.9; 1]
ch = [8; 14; 12; 4; 10; 8; 10; 15; 10; 9]
Гистограмма
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# Проверка по критерию Пирсона
# Н0: СВ подчиняется равномерному распределению
# Н1: СВ не подчиняется равномерному  распределению
p := 1/k = 0.1  # - вероятность попадания в интервал
Knabl := sum((ch[i] - n*p)^2/(n*p), i = 0 .. k - 1) = 9
α := 0.05  # - уровень значимости
r := 0  # - количество степеней свободы распределения
Kkrit := qchisq(1 - α, k - r - 1) = 16.919
# Критерий Пирсона имеет правостороннюю критическую область. Knabl < Kkrit.
# => Нет оснований отвергать основную гипотезу, т. е. СВ подчиняется равномерному нормальному распределению.
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# Часть 2 | Вариант 2
β := 0.94  # оценка погрешности
integral(sqrt(x^3 + 8), x = 1 .. 3)  # интеграл
ε := 0.02  # доверительная вероятность
a := 1
b := 3
# Плотность равномерного распределения X~R(1,3)
max := 3
f(x) := 1/(b - a)
f(1) = 0.5
min := 1
# После необходимых математических манипуляций получаем
h(x) := 2*sqrt(x^3 + 8)
hmax := h(max) = 11.8322
hmin := h(min) = 6
I := integral(h(x)*f(x), x = a .. b) = 8.30845
# Вычисляем количество испытаний, необходимое для вычисления интеграла с заданной доверительной точностью и заданной доверительной вероятностью
R := hmax - hmin = 5.83216  # - размах
σ := R/6 = 0.972027  # β = 2Ф((ε*n^(0.5))/σ)
t := qnorm(β/2 + 0.5, 0, 1) = 1.88079  # значение аргумента функции Лапласа, равной β/2
n := (t*σ/ε)^2 = 8355.62
n := round(n, 0) = 8356
# С помощью стандартного датчика  rnd генерируем n случайных чисел
i := 1 .. n
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γ[i] := rnd(1)
γ =  # no stored result
# Преобразуем γ_i в x_i=a+(b-a)*γ_i
x[i] := a + (b - a)*γ[i]
# Вычислим оценку I` для интеграла I
x =  # no stored result
I' := 1/n*sum(h(x[i]), i = 1 .. n) = 8.33706
# Вычислим оценку дисперсии D`
D' := 1/n*sum(h(x[i])^2 - I'^2, i = 1 .. n) = 3.02601
# Найдём точность, с которой вычислен этот интеграл по формуле
# β =2Ф( (ε*n^0.5)/D`^0.5)
ε1 := t*sqrt(D'/n) = 0.0357913
# Найдём доверительный интервал
left := I - ε1 = 8.27266
I = 8.30845
right := I + ε1 = 8.34424
# Точность оказалась недостаточной, так что увеличиваем количество опытов и повторяем оценки
n := n*2 = 16712
i := 1 .. n
γ[i] := rnd(1)
x[i] := a + (b - a)*γ[i]
γ =  # no stored result
x =  # no stored result
I' := 1/n*sum(h(x[i]), i = 1 .. n) = 8.30685
D' := 1/n*sum(h(x[i])^2 - I'^2, i = 1 .. n) = 2.96931
ε1 := t*sqrt(D'/n) = 0.02507
left := I - ε1 = 8.28338
I = 8.30845
right := I + ε1 = 8.33352
# Точность оказалась недостаточной, так что увеличиваем количество опытов и повторяем оценки
n := n*2 = 33424
i := 1 .. n
γ[i] := rnd(1)
x[i] := a + (b - a)*γ[i]
γ =  # no stored result
x =  # no stored result
I' := 1/n*sum(h(x[i]), i = 1 .. n) = 8.31381
D' := 1/n*sum(h(x[i])^2 - I'^2, i = 1 .. n) = 2.97352
ε1 := t*sqrt(D'/n) = 0.0177397
left := I' - ε1 = 8.29607
I = 8.30845
right := I' + ε1 = 8.33155
# Мы достигли необходимой точности, теперь записываем доверительный интервал
left := round(left, 2) = 8.3
rigth := round(right, 2) = 8.33
I := round(I, 2) = 8.31
# Ответ: (8.29 - 0,018; 8.33 + 0.18)
ε = 0.02
n = 33424
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# Доверительный интервал накрывает
