# Лабораторная работа №6 "Множественная линейная регрессия"
# Вариант 2
# Регрессия – это односторонняя стохастическая зависимость. Она устанавливает соответствие между случайными переменными. Каждому значению x соответствует множество значений y и, наоборот, каждому значению y соответствует множество значений x. Таким образом, мы имеем дело со статистическими распределениями значений x и значений y
# Понятия регрессии и корреляции непосредственно связаны между собой. В то время как в корреляционном анализе оценивается сила стохастической связи, в регрессионном анализе исследуется её форма. С помощью оценки значимости решают вопрос о реально объективном существовании связи. С помощью корреляционного анализа нельзя указать, какое явление принимать в качестве причины, а какое – в качестве следствия. Корреляция лишь даёт оценку силы, или тесноты связи.
# Условие задачи:
# По 12 предприятиям региона изучается зависимость выработки продукции а одного работника y (тыс. руб.) от ввода в действие новых основных фондов x_1 (% от стоимости фондов на конец года) и от удельного веса рабочих высокой квалификации в общей численности рабочих x_2 (%). Построить модель множественной линейной регрессии, найти оценки параметров, определить доверительные интервалы для параметров, проверить адекватность модели. Ошибки наблюдений независимы и имеют распределение N(0,σ)
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# Т. к. по условию задачи рассматриваем зависимость между тремя переменными, будем работать с множественной регрессией.
# Также можно сделать вывод, что Y является откликом, а X_1 и X_2 факторами.
# Входные данные:
n := 12
α := 0.05
k := 2
ORIGIN := 1
# Матрица Х, это матрица, в которой первый столбец это х0, второй столбец - х1, третий столбец - х2
y0 := [6; 6; 7; 7; 7; 8; 8; 9; 9; 10; 10; 11]
x1 := [3.5; 3.6; 3.9; 4.1; 4.2; 4.5; 5.3; 5.3; 5.6; 6; 6.3; 6.4]
x2 := [10; 12; 15; 17; 18; 19; 19; 20; 20; 21; 21; 22]
x := [
    1, 3.5, 10;
    1, 3.6, 12;
    1, 3.9, 15;
    1, 4.1, 17;
    1, 4.2, 18;
    1, 4.5, 19;
    1, 5.3, 19;
    1, 5.3, 20;
    1, 5.6, 20;
    1, 6, 21;
    1, 6.3, 21;
    1, 6.4, 22
]
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# Получается, что на данный момент наше уравнение регрессии выглядит так
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# Исходя из этой формулы, можно найти необходимые коэффициенты для нашего уравнения регрессии
# Дополнительно выяислим матрицу С, элементы которой далее понядобятся для вычисления стандартных ошибокк
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C := (transpose(x)*x)^-1 = [2.22448, -0.168111, -0.0739513; -0.168111, 0.395001, -0.0989217; -0.0739513, -0.0989217, 0.0312809]
# Далее, в формулу, показанную выше подставляем значения
B0 := C*transpose(x)*y0 = [0.592078; 1.34583; 0.0555829]
# В данной ситуации получается, что уравнение регрессии имеет вид
# y = 0.056*x2 + 1.346*x1 + 0.592
# Следовательно  при изменении х1 на единицу, у увеличивается на 1,346 (при фиксированном х2), а при изменении х2 на единицу, у увеличивается на 0,056 (при условии фиксированного х1)
# Запишем уравнение регрессии для использования его в дальшейних математических манипуляциях
y(x1, x2) := 0.056*x2 + 1.346*x1 + 0.592
i := 1 .. n
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# Вектор возмущений, характеризующий отклонение экспериментальных данных от модельных
# Qb - сумма квадратов отклонений по методу наименьших квадратов, он требует минимизировать отклонение экспериментальных данных от модельных
e := y0 - y(x1, x2) = [0.137; -0.1096; 0.3186; -0.0626; -0.2532; 0.287; -0.7898; 0.1542; -0.2496; 0.156; -0.2478; 0.5616]
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Qb := sum(e[i]^2, i = 1 .. n) = 1.39368
transpose(e)*e = 1.39368
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Se := Qb/(n - (k + 1)) = 0.154854
# Теперь найдём среднее по у
ysr := 1/n*sum(y0[i], i = 1 .. n) = 8.16667
# Для перехода к построение доверительного интервала необходимо проверить значимость коэффициентов регрессии
# Наиболее часто в задаче регрессии возникает вопрос о равенстве нулю
# коэффициентов регрессии. Со статистической точки зрения это означает проверку гипотезы H0: bi = 0. Важность этой гипотезы объясняется тем, что в этом случае переменная y изменяется чисто случайно, не завися от значения x. Против двусторонних альтернатив H1: bi ≠ 0 гипотезу H0 следует отвергнуть на уровне значимости α, если число 0 не входит в доверительный интервал для bi, который мы стандартным образом строим с помощью распределения Стьюдента.
Kkrit := qt(1 - α/2, n - k - 1) = 2.26216
i := 1, 2 .. k + 1
SB0[i] := sqrt(Se)*sqrt(C[i, i])
SB0 = [0.586914; 0.24732; 0.0695986]  # СКО (стандартная ошибка) коэффициента регрессии bi
Knabl[i] := |B0[i]/SB0[i]|
Knabl = [1.0088; 5.44165; 0.798621]  # Knabl >Kkrit только для b1 => только для  b1 можно построить доверительный интервал
# Рассчитаем границы доверительного интервала
grl := B0 - Kkrit*SB0 = [-0.735614; 0.786354; -0.10186]
grr := B0 + Kkrit*SB0 = [1.91977; 1.90531; 0.213026]
# Произведя некоторые математические манипуляции, делаем вывод о том, что только коэффициент b1 является значимым
# Проверить адекватность модели – значит установить, соответствует ли математическая модель, выражающая зависимость между переменными, экспериментальным данным; и достаточно ли включенных в уравнение регрессии объясняющих переменных (одной или нескольких) для описания
# зависимой переменной.
# Проверка значимости уравнения регрессии проводится на основании дисперсионного анализа как вспомогательного средства для изучения качества регрессионной модели
# Сформулируем основную гипотезу
# H0: DY = De - дисперсия зависимой переменной, обусловленная соответственно регрессией или объясняющими переменными, равна дисперсии, обусловленной воздействием случайных неучтённых факторов.
# Сформулируем альтернативную гипотезу
# H1: DY > De - вклад, вносимый в дисперсию совместным одновременным влиянием объясняющих переменных x1,x2, .., xn выше суммарного эффекта от воздействия всех неучтённых факторов.
# Вычисляем оценку дисперсии зависимой переменной
Sy := 1/(n - 1)*sum((y0[i] - ysr)^2, i = 1 .. n) = 2.69697
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Ftabl := qF(1 - α, n - 1, n - k - 1) = 3.10249
Fnabl := Sy/Se = 17.4163
# Так как Fnabl>Ftabl, то гипотеза Н0 отвергается в пользу альтернативной Н1.
# Итог: модель адекватна, уравнение регрессии значимо, следовательно исследуемая зависимая переменная Y достаточно хорошо описывается включённой в регрессионную модель переменной X2
