# Цепи Маркова
# Вариант 2
# Задача 1
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# Сначла дадим определение цепи Маркова (далее - ЦМ) и выделим особенности такого способа анализа
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# Особенность цепи Маркова – последовательности случайных величин – состоит в том, что ее поведение в следующий момент времени зависит только от настоящего момента, но не зависит от «предыстории», от ее «поведения» в прошлом
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# Опираясь на данные задачи, получаем следующий орграф:
# Далее рассмотрим матрицу перехода
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# Вот матрица перехода для данной задачи:
P := [0, 0.5, 0, 0.5; 0.5, 0, 0.5, 0; 0, 0.5, 0, 0.5; 0.5, 0, 0.5, 0]
# Все элементы матрицы неотрицательны, так же сумма элементов любой строки равна единице => матрица стохастическая.
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# Следуя данной теореме, чтобы узнать, с какой вероятностью на второй итерации частица вернётся в начальное положение, необходимо возвести в квадрат матрицу P и посмотреть на диагональные элементы.
# Следовательно, с какой бы точки не начинала движение частица, вероятность оказаться в той же точке через 2 хода равна 0,5.
P2 := P^2 = [0.5, 0, 0.5, 0; 0, 0.5, 0, 0.5; 0.5, 0, 0.5, 0; 0, 0.5, 0, 0.5]
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# Опираясь на теорию выше, можно сказать, что наша ЦМ эгордическая, так как поглощающие (поглощающими называются такие состояния, в которые ЦМ может войти, но выйти из них уже не может) состояния отсутствуют и из любого состояния можно попасть в любое другое.
P^5 = [0, 0.5, 0, 0.5; 0.5, 0, 0.5, 0; 0, 0.5, 0, 0.5; 0.5, 0, 0.5, 0]
P^6 = [0.5, 0, 0.5, 0; 0, 0.5, 0, 0.5; 0.5, 0, 0.5, 0; 0, 0.5, 0, 0.5]
P^10 = [0.5, 0, 0.5, 0; 0, 0.5, 0, 0.5; 0.5, 0, 0.5, 0; 0, 0.5, 0, 0.5]
P^15 = [0, 0.5, 0, 0.5; 0.5, 0, 0.5, 0; 0, 0.5, 0, 0.5; 0.5, 0, 0.5, 0]
# Матрицы перехода за 5, 6, 10 и 15  состояний соответственно
#
# "Цепь регулярна тогда и только тогда, когда существует такое n, что в матрице P^n все элементы ненулевые, то есть из любого состояния можно перейти в любое за n переходов."
# Соответственно, наша ЦМ, чья матрица переходов имеет лишь 2 состояния, причём, оба содержат нули, не регулярная. Следовательно, предельных вероятностей нет.
# Задача 2
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P := [1, 0, 0, 0; 1/4, 0, 1/2, 1/4; 2/3, 1/3, 0, 0; 0, 0, 0, 1]
# Так как в задании отсутствуют какие-либо отправные данные для описания состояний ЦМ, опишем их следующим образом: X = {1,2,3,4-}
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# На основе данной матрицы перехода построим орграф:
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# Запишем матрицу P в каноничном виде:
Pk := [1, 0, 0, 0; 0, 1, 0, 0; 1/4, 1/4, 0, 1/2; 2/3, 0, 1/3, 0]
# Порядок состояний в каноничном виде: 1, 4, 2, 3
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# Определим еденичную матрицу и матрицу Q для дальнейших вычислений:
Q := [0, 1/2; 1/3, 0]
I := [1, 0; 0, 1]
# Далее найдём фундаментальную матрицу по формуле, показанной выше:
# 1  4
N := (I - Q)^-1 = [1.2, 0.6; 0.4, 1.2]
# 2
# 3
# Исходя из фундаментальной матрицы можно сделать вывод о продолжительности игры в каждом из непоглощающих состояний
# Для состояния 2:
# Для состояния 3:
1.2 + 0.6 = 1.8
0.4 + 1.2 = 1.6
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# Для нахождения матрицы В необходимо сначала определить матрицу R
R := [1/4, 1/4; 2/3, 0]
# Теперь находим матрицу вероятностей перехода к конкретному поглощающему состоянию:
# Матрица В стохастическая
B := N*R = [0.7, 0.3; 0.9, 0.1]  # Вероятности перехода от непоглощающего состояния к поглощающему представлены в таблице
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